@DSL ImplicitII;
@Behaviour Affine_tensors;
@Author Martin Antoine;
@Date 26 / 01 / 26;
@Description{"Affine formulation for homogenization of a viscoplastic polycrystal, (Masson et al. 2001.), based on Green interaction tensors"};
@UseQt false;
@Algorithm NewtonRaphson_NumericalJacobian;
@PerturbationValueForNumericalJacobianComputation 1e-10;
@Epsilon 1e-14;

@TFELLibraries {"Material"};

@Includes{
#include "extra-headers/TFEL/Material/tensors.hxx"
#include "TFEL/Material/ExtendedPolyCrystalsSlidingSystems.hxx"}

//! number of phases
@IntegerConstant Np =10;

//! normalization strainrate
@Parameter real gamma0 = 1.0;
//! bulk modulus of the reference medium used for the interaction tensors
@Parameter stress k0 = 1;
//! bulk modulus of the reference medium used for the interaction tensors
@Parameter stress mu0 = 1;

@ModellingHypothesis Tridimensional;
@OrthotropicBehaviour;
@CrystalStructure HCP;
@SlidingSystems{<1, 1, -2, 0>{1, -1, 0, 0},
                <-2, 1, 1, 3>{1, -1, 0, 1},
                <-2, 1, 1, 0>{0, 0, 0, 1},
                <1, 1, -2, 0>{1, -1, 0, 1}};

@MaterialProperty real nexp;
@MaterialProperty real tau1;
@MaterialProperty real tau2;
@MaterialProperty real kap;
@MaterialProperty real r0;

@StateVariable Stensor sigma[Np];
sigma.setEntryName("PhaseReferenceStress");

@AuxiliaryStateVariable real ne;

@LocalVariable Stensor4 I;
@LocalVariable Stensor4 J;
@LocalVariable Stensor4 K;
@LocalVariable Stensor4 L0;
@LocalVariable Stensor4 M0;
@LocalVariable real frac[Np];
@LocalVariable real tau0[Np];
@LocalVariable Stensor4 M[Np];
@LocalVariable Stensor4 L[Np];
@LocalVariable Stensor4 Ar[Np];
@LocalVariable tmatrix<6*Np,6,real> A;
@LocalVariable std::array<std::array<tfel::math::st2tost2<3u,real>,Np>,Np> DELTA;
@LocalVariable tmatrix<6*Np,6,real> dsigma_deto;

@InitLocalVariables{
I=tfel::math::st2tost2<3u,real>::Id();
J=tfel::math::st2tost2<3u,real>::J();
K=tfel::math::st2tost2<3u,real>::K();
DELTA=Delta<real>::get_tensor();
L0=r0*(3*k0*J+2*mu0*K);
M0=invert(L0);

for (int r=0;r<Np;r++){
if (r<5){tau0[r]=tau1;}
else{tau0[r]=tau2;}
}
}


@Integrator {
ne=nexp;
using PolyCrystalsSlidingSystems =
	ExtendedPolyCrystalsSlidingSystems<Np, Affine_tensorsSlipSystems<real>, real>;
const auto& gs =
	PolyCrystalsSlidingSystems::getPolyCrystalsSlidingSystems("polycrystal.csv");

//tangent modulus and polarization/////////////////////////////////
using namespace tfel::math;
Stensor e[Np];
Stensor4 Chom;
Stensor dpsi_dsigma[Np];

for (int r=0;r<Np;r++){
 M[r]=Stensor4::zero();
 dpsi_dsigma[r]=Stensor::zero();
 frac[r]=gs.volume_fractions[r];
 for (int k=0;k<Nss;k++){
  const auto Nkr = gs.mus[r][k]^gs.mus[r][k];
  const auto taukr = gs.mus[r][k] | (sigma[r]+dsigma[r]);
  const auto puisn_1 = pow(abs(taukr)/tau0[r], nexp-1);
  const auto fac= nexp*gamma0/tau0[r]*puisn_1;
  M[r]+=fac*Nkr;
  const auto puisn = puisn_1*abs(taukr)/tau0[r];
  const auto sgn= taukr< 0 ? -real(1) : real(1);
  dpsi_dsigma[r]+=sgn*gamma0*puisn*gs.mus[r][k];
 }
 e[r]=dpsi_dsigma[r]-M[r]*(sigma[r]+dsigma[r]);
 M[r]=M[r]+kap*I;
 L[r]=invert(M[r]);
}

//Operators A and B/////////////////////////////////
tmatrix<6*Np,6*Np,real> MAT;
tmatrix<6*Np,6*Np,real> G;
tmatrix<6*Np,6,real> E;
for (int r=0;r<Np;r++){
  map_derivative<Stensor,Stensor>(E,6*r,0)=L0;
  const auto dM = M[r]-M0;
  for (int s=0;s<Np;s++){
    if (true){
    map_derivative<Stensor,Stensor>(MAT,6*r,6*s) +=r0*DELTA[r][s]*dM;
    map_derivative<Stensor,Stensor>(G,6*r,6*s) -=r0*DELTA[r][s];
    }
  }
  map_derivative<Stensor,Stensor>(MAT,6*r,6*r) +=I;
}

TinyMatrixInvert<6*Np,real>::exe(MAT);
A = MAT*E;
tmatrix<6*Np,6*Np,real> B = MAT*G;

Chom=Stensor4::zero();
for (int r=0;r<Np;r++){
  Ar[r]=map_derivative<Stensor,Stensor>(A,6*r,0);
  Chom+=frac[r]*Ar[r];
}

//residues/////////////////////////////////////
for (int r=0;r<Np;r++){
  fsigma[r] = M[r]*(sigma[r]+dsigma[r])-M[r]*Ar[r]*(eto+deto);
  for (int s=0;s<Np;s++){
    auto Brs = map_derivative<Stensor,Stensor>(B,6*r,6*s);
    fsigma[r]-=M[r]*Brs*e[s];
  }
}

//macroscopic stress//////////////////////////////////////
auto tau_eff=Stensor::zero();
for (int r=0;r<Np;r++){
  tau_eff-=frac[r]*transpose(Ar[r])*e[r];
}

sig=Chom*(eto+deto)+tau_eff;
}


@TangentOperator{
if (smt){
for (int r=0;r<Np;r++){
  map_derivative<Stensor,Stensor>(A,6*r,0)=M[r]*Ar[r];
}

tmatrix<6*Np,6*Np,real> iJ = jacobian;
TinyMatrixInvert<6*Np,real>::exe(iJ);
dsigma_deto=iJ*A;
Dt=Stensor4::zero();
for (int r=0;r<Np;r++){
   const auto dsigmar_deto = map_derivative<Stensor,Stensor>(dsigma_deto,6*r,0);
   Dt+=frac[r]*dsigmar_deto;
}

}

}
